Boxed Wing
#Mach
0.75
#IYsym IZsym Zsym
0  0  0
#Sref  Cref  Bref
200 4 42.42640687119285
#Xref Yref Zref
0.3  0.0  0.0806
CDdp
0.01

SURFACE
Wing
8  1.0  12  -2.0
YDUPLICATE
0.0
ANGLE
0.0
SECTION
0 0 0 4 0.0 0 0
SECTION
9.89187921601854 21.213203435596427 11.588825854429178 2 0.0 0 0
